// SBML level 2 version 4

function MAX(a, b)
  piecewise(a, a >= b, b);
end

function V_Adk(rho_protein, k, phi_E, S1, K1, S2, K2, log10_QoverK, chi)
  rho_protein*k*phi_E*(S1/(S1 + K1))*(S2/(S2 + K2))*(1 - 10^(log10_QoverK/chi));
end

function V_Sulp(rho_protein, k, phi_E, S1, K1, log10_QoverK, m, F_RTk, delta_phi)
  rho_protein*k*phi_E*(S1/(S1 + K1))*(1 - 10^log10_QoverK*exp(-m*F_RTk*delta_phi));
end

function V_Ppa(rho_protein, k, phi_E, S1, K1, log10_QoverK, m, F_RTk, delta_phi)
  rho_protein*k*phi_E*(S1/(S1 + K1))*(1 - 10^log10_QoverK*exp(m*F_RTk*delta_phi));
end

function V_redox(rho_protein, k, phi_E, S1, K1, S2, K2, F_RTk, n, Ea, Ed, m, delta_phi)
  rho_protein*k*phi_E*(S1/(S1 + K1))*(S2/(S2 + K2))*(1 - exp(-F_RTk*(n*(Ea - Ed) - m*delta_phi)/MAX(n, m)));
end

function V_Aha(rho_protein, k, phi_E, S1, K1, S2, K2, log10_QoverK, m, F_RTk, delta_phi)
  rho_protein*k*phi_E*(S1/(S1 + K1))*(S2/(S2 + K2))*(1 - 10^(log10_QoverK/m)*exp(-F_RTk*delta_phi));
end

model SRB()

  // Compartments:
  compartment Cytoplasm = 1;
  compartment Membrane = 0.015;
  compartment Environment = 1;

  // Species:
  species $adp in Cytoplasm = 0.001;
  species $atp in Cytoplasm = 0.01;
  species $pi in Cytoplasm = 0.01;
  species so4in in Cytoplasm = 0.00064;
  species aps in Cytoplasm = 1e-6;
  species ppi in Cytoplasm = 0.001;
  species amp in Cytoplasm = 0.001;
  species so3 in Cytoplasm = 1e-6;
  species $hs in Cytoplasm = 0.001;
  species hout in Membrane = 7e-5;
  species mqox in Membrane = T_mq/2;
  species mqred in Membrane = T_mq/2;
  species $so4out in Environment = 0.01;
  species $tpicox in Cytoplasm = T_tpic*f_tpic/(1 + f_tpic);
  species $tpicred in Cytoplasm = T_tpic/(1 + f_tpic);
  species $mphen in Cytoplasm = T_mphen*f_mphen/(1 + f_mphen);
  species $mphenh2 in Cytoplasm = T_mphen/(1 + f_mphen);

  // Parameters:
  FR_Tk has unit_0;
  Tk = 298.15 unit_1;
  F = 96485 unit_2;
  R = 8.3145 unit_3;
  r_cell = 2e-7 unit_4;
  d_mem = 5e-9 unit_4;
  V_mem = 4*pi*r_cell^2*d_mem*1000; V_mem has unit_5;
  Sp_capacitan = 0.01 unit_6;
  molal_V = V_mem*F/(Sp_capacitan*4*pi*r_cell^2); molal_V has unit_7;
  delta_phi has unit_8;
  log_QoverK_Aha has unit_9;
  rho_protein = 242*0.63; rho_protein has unit_10;
  log_QoverK_Adk has unit_9;
  log_QoverK_Sat has unit_9;
  E_so3_hs has unit_8;
  E_mq has unit_8;
  log_QoverK_Ppa has unit_9;
  E_aps_so3 has unit_8;
  log_QoverK_Sulp has unit_9;
  Rate_SR has unit_11;
  Rate_growth has unit_12;
  T_mq = 0.0139 unit_13;
  f_mq = 7e-7 unit_9;
  phi_mem has unit_9;
  chi_SulpH has unit_9;
  T_tpic = 0.00031 unit_13;
  E_tpic has unit_8;
  T_mphen = 0.00335 unit_13;
  E_mphen has unit_8;
  f_mphen = 0.01 unit_9;
  ATP_yield has unit_9;
  chi_Atp has unit_9;
  chi_Apr has unit_9;
  chi_Dsr has unit_9;
  m_Dsr has unit_9;
  m_Apr has unit_9;
  m_Sulp has unit_9;
  m_Qrc has unit_9;
  m_Atp has unit_9;
  f_tpic = 0.07674 unit_9;
  Metabolites has unit_13;
  Adk_phi_E = 0.0295213;
  Apr_phi_E = 0.0332971;
  Apr_H_phi_E = 0.000405898;
  Atp_4H_phi_E = 0.0190977;
  Dsr_phi_E = 2.57197e-5;
  Ppa_phi_E = 0.026796;
  Sat_phi_E = 0.0704969;
  Sulp_phi_E = 0.000459853;
  Sulp_1H_phi_E = 0.000937929;
  Qrc_phi_E = 0.00519501;
  Pcc_phi_E = 0;
  Atp_3H_phi_E = 0;
  Dsr_2H_phi_E = 0.00901695;
  Ppa_0H_phi_E = 0.00100559;
  Qrc_0H_phi_E = 0.00374388;
  Initial_for_FR_Tk = FR_Tk;
  Initial_for_F = F;
  Initial_for_R = R;
  Initial_for_Tk = Tk;
  Initial_for_molal_V = molal_V;
  Initial_for_rho_protein = rho_protein;

  // Assignment rules:
  log_QoverK_Sulp := log10(so4in) - log10(so4out);
  log_QoverK_Adk := 2*log10(adp) - log10(amp) - log10(atp) - 0;
  log_QoverK_Ppa := 2*log10(pi) - log10(ppi) - 3.8017;
  log_QoverK_Aha := log10(atp) - log10(adp) - log10(pi) + 5.5711;
  phi_E := Adk_phi_E + Apr_phi_E + Apr_H_phi_E + Atp_4H_phi_E + Dsr_phi_E + Ppa_phi_E + Sat_phi_E + Sulp_phi_E + Sulp_1H_phi_E + Qrc_phi_E + Pcc_phi_E + Atp_3H_phi_E + Dsr_2H_phi_E + Ppa_0H_phi_E + Qrc_0H_phi_E;
  Rate_growth := (Atp_4H + Atp_3H - Sat - Adk)/Initial_for_rho_protein*24*3600*5;
  FR_Tk := Initial_for_F/(Initial_for_R*Initial_for_Tk);
  E_mq := -0.074 + 1/(2*Initial_for_FR_Tk)*ln(mqox/mqred);
  delta_phi := hout*Initial_for_molal_V;
  log_QoverK_Sat := log10(aps) + log10(ppi) - log10(so4in) - log10(atp) + 8.1289;
  E_aps_so3 := -0.06 + 1/(2*Initial_for_FR_Tk)*ln(aps/(amp*so3));
  Rate_SR := (Sulp + Sulp_1H)/Initial_for_rho_protein*24*3600;
  E_so3_hs := -0.116 + 1/(6*Initial_for_FR_Tk)*ln(so3/hs);
  m_Dsr := (6*Dsr_phi_E + 2*Dsr_2H_phi_E)/(Dsr_phi_E + Dsr_2H_phi_E);
  m_Qrc := 2*Qrc_phi_E/(Qrc_phi_E + Qrc_0H_phi_E);
  chi_Apr := (Apr_phi_E + Apr_H_phi_E*0.5)/(Apr_phi_E + Apr_H_phi_E);
  m_Sulp := Sulp_1H_phi_E/(Sulp_1H_phi_E + Sulp_phi_E);
  phi_mem := Sulp_phi_E + Apr_phi_E + Dsr_phi_E + Ppa_phi_E + Atp_4H_phi_E + Sulp_1H_phi_E + Qrc_phi_E + Pcc_phi_E + Atp_3H_phi_E + Apr_H_phi_E + Dsr_2H_phi_E + Ppa_0H_phi_E + Qrc_0H_phi_E;
  E_tpic := -0.17 + 1/(Initial_for_FR_Tk*1)*ln(tpicox/tpicred);
  Metabolites := adp + amp + aps + atp + hs + pi + ppi + so3 + so4in + mqox + mqred + tpicox + tpicred;
  chi_SulpH := Sulp_1H_phi_E/(Sulp_1H_phi_E + Sulp_phi_E);
  chi_Atp := (3*Atp_3H_phi_E + 4*Atp_4H_phi_E)/(Atp_3H_phi_E + Atp_4H_phi_E);
  m_Ppa := Ppa_phi_E/(Ppa_phi_E + Ppa_0H_phi_E);
  ATP_yield := (Atp_4H + Atp_3H - Sat - Adk)/(Sulp + Sulp_1H);
  E_mphen := -0.165 + 1/(2*Initial_for_FR_Tk)*ln(mphen/mphenh2);
  m_Apr := (2*Apr_phi_E + Apr_H_phi_E)/(Apr_phi_E + Apr_H_phi_E);
  m_Atp := (4*Atp_4H_phi_E + 3*Atp_3H_phi_E)/(Atp_4H_phi_E + Atp_3H_phi_E);
  chi_Dsr := (Dsr_phi_E + Dsr_2H_phi_E*4/6)/(Dsr_phi_E + Dsr_2H_phi_E);

  // Reactions:
  Atp_4H: $adp + $pi + 4 hout -> $atp; V_Aha(rho_protein, Atp_4H_k, Atp_4H_phi_E, adp, Atp_4H_K1, pi, Atp_4H_K2, log_QoverK_Aha, m_Atp, FR_Tk, delta_phi);
    Atp_4H_k = 0.00095; Atp_4H_K1 = 0.0001; Atp_4H_K2 = 0.0042;
  Sat: so4in + $atp -> aps + ppi; V_Adk(rho_protein, Sat_k, Sat_phi_E, so4in, Sat_K1, atp, Sat_K2, log_QoverK_Sat, Sat_chi);
    Sat_k = 0.000481667; Sat_K1 = 0.00313; Sat_K2 = 0.00078; Sat_chi = 1;
  Ppa: ppi -> 2 $pi + hout; V_Ppa(rho_protein, Ppa_k, Ppa_phi_E, ppi, Ppa_K1, log_QoverK_Ppa, m_Ppa, FR_Tk, delta_phi);
    Ppa_k = 0.00533333; Ppa_K1 = 0.0012;
  // reverse
  Apr: aps + mqred -> so3 + amp + mqox + 2 hout; V_redox(rho_protein, Apr_k, Apr_phi_E, aps, Apr_K1, mqred, Apr_K2, FR_Tk, Apr_n, E_aps_so3, E_mq, m_Apr, delta_phi);
    Apr_k = 0.000216667; Apr_K1 = 1.9e-5; Apr_K2 = 4e-6; Apr_n = 2;
  Adk: amp + $atp -> 2 $adp; V_Adk(rho_protein, Adk_k, Adk_phi_E, amp, Adk_K1, atp, Adk_K2, log_QoverK_Adk, Adk_chi);
    Adk_k = 0.0336667; Adk_K1 = 4e-5; Adk_K2 = 4.9e-5; Adk_chi = 1;
  Dsr: so3 + 3 mqred -> $hs + 3 mqox + 6 hout; V_redox(rho_protein, Dsr_k, Dsr_phi_E, so3, Dsr_K1, mqred, Dsr_K2, FR_Tk, Dsr_n, E_so3_hs, E_mq, m_Dsr, delta_phi);
    Dsr_k = 0.00116667; Dsr_K1 = 1.2e-5; Dsr_K2 = 4e-6; Dsr_n = 6;
  Sulp: $so4out -> so4in; V_Sulp(rho_protein, Sulp_k, Sulp_phi_E, so4out, Sulp_K1, log_QoverK_Sulp, m_Sulp, FR_Tk, delta_phi);
    Sulp_k = 0.00333333; Sulp_K1 = 4e-6;
  Sulp_1H: $so4out + hout -> so4in; V_Sulp(rho_protein, Sulp_1H_k, Sulp_1H_phi_E, so4out, Sulp_1H_K1, log_QoverK_Sulp, m_Sulp, FR_Tk, delta_phi);
    Sulp_1H_k = 0.00333333; Sulp_1H_K1 = 4e-6;
  Qrc: 2 $tpicred + mqox -> 2 $tpicox + mqred + 2 hout; V_redox(rho_protein, Qrc_k, Qrc_phi_E, tpicred, Qrc_K1, mqox, Qrc_K2, FR_Tk, Qrc_n, E_mq, E_tpic, m_Qrc, delta_phi);
    Qrc_k = 0.00781667; Qrc_K1 = 8e-7; Qrc_K2 = 4e-6; Qrc_n = 2;
  Pcc: 2 $tpicox + $mphenh2 -> 2 $tpicred + $mphen; V_redox(rho_protein, Pcc_k, Pcc_phi_E, tpicox, Pcc_K1, mphenh2, Pcc_K2, FR_Tk, Pcc_n, E_tpic, E_mphen, m, delta_phi);
    Pcc_k = 0.0404762; Pcc_K1 = 3.9e-6; Pcc_K2 = 3.5e-5; Pcc_n = 2; m = 0;
  Atp_3H: $adp + $pi + 3 hout -> $atp; V_Aha(rho_protein, Atp_3H_k, Atp_3H_phi_E, adp, Atp_3H_K1, pi, Atp_3H_K2, log_QoverK_Aha, m_Atp, FR_Tk, delta_phi);
    Atp_3H_k = 0.00095; Atp_3H_K1 = 0.0001; Atp_3H_K2 = 0.0042;
  // reverse
  Apr_H: aps + mqred -> so3 + amp + mqox + hout; V_redox(rho_protein, Apr_H_k, Apr_H_phi_E, aps, Apr_H_K1, mqred, Apr_H_K2, FR_Tk, Apr_H_n, E_aps_so3, E_mq, m_Apr, delta_phi);
    Apr_H_k = 0.000216667; Apr_H_K1 = 1.9e-5; Apr_H_K2 = 4e-6; Apr_H_n = 2;
  Dsr_2H: so3 + 3 mqred -> $hs + 3 mqox + 2 hout; V_redox(rho_protein, Dsr_2H_k, Dsr_2H_phi_E, so3, Dsr_2H_K1, mqred, Dsr_2H_K2, FR_Tk, Dsr_2H_n, E_so3_hs, E_mq, m_Dsr, delta_phi);
    Dsr_2H_k = 0.00116667; Dsr_2H_K1 = 1.2e-5; Dsr_2H_K2 = 4e-6; Dsr_2H_n = 6;
  Qrc_0H: 2 $tpicred + mqox -> 2 $tpicox + mqred; V_redox(rho_protein, Qrc_0H_k, Qrc_0H_phi_E, tpicred, Qrc_0H_K1, mqox, Qrc_0H_K2, FR_Tk, Qrc_0H_n, E_mq, E_tpic, m_Qrc, delta_phi);
    Qrc_0H_k = 0.00781667; Qrc_0H_K1 = 8e-7; Qrc_0H_K2 = 4e-6; Qrc_0H_n = 2;
  Ppa_0H: ppi -> 2 $pi; V_Ppa(rho_protein, Ppa_0H_k, Ppa_0H_phi_E, ppi, Ppa_0H_K1, log_QoverK_Ppa, m_Ppa, FR_Tk, delta_phi);
    Ppa_0H_k = 0.00533333; Ppa_0H_K1 = 0.0012;

  // Unit definitions:
  unit length = metre;
  unit area = metre^2;
  unit volume = litre;
  unit time = second;
  unit substance = mole;
  unit unit_0 = 1 / volt; unit_0 is "1/V";
  unit unit_1 = kelvin; unit_1 is "K";
  unit unit_2 = coulomb / mole; unit_2 is "C/mol";
  unit unit_3 = joule / (mole * kelvin); unit_3 is "J/mol/K";
  unit unit_4 = metre; unit_4 is "m";
  unit unit_5 = litre; unit_5 is "liter";
  unit unit_6 = farad; unit_6 is "F";
  unit unit_7 = volt * litre / mole; unit_7 is "V*l/mol";
  unit unit_8 = volt; unit_8 is "V";
  unit unit_9 = dimensionless^0; unit_9 is "1";
  unit unit_10 = gram / litre; unit_10 is "g/l";
  unit unit_11 = mole / (86400 second * gram); unit_11 is "mol/g/d";
  unit unit_12 = 1 / (86400 second); unit_12 is "1/d";
  unit unit_13 = mole / litre; unit_13 is "mol/l";
end
